<?xml version="1.0" encoding="UTF-8"?>
<networkml xmlns="http://morphml.org/networkml/schema" xmlns:meta="http://morphml.org/metadata/schema" xmlns:xsi="http://www.w3.org/2001/XMLSchema-instance" xsi:schemaLocation="http://morphml.org/networkml/schema  http://www.neuroml.org/NeuroMLValidator/NeuroMLFiles/Schemata/v1.8.1/Level3/NetworkML_v1.8.1.xsd" lengthUnits="micrometer">

<meta:notes>

Network structure for project: Ex5_Networks saved with neuroConstruct v1.4.1 on: 18:10:09, 16-Nov-10

Cell Group: ThirdCellGroup contains 12 cells
Cell Group: UpperCellGroup contains 12 cells
Cell Group: LowerCellGroup contains 12 cells

Network connection: UpperToThird contains 24 individual synaptic connections
Network connection: Closest contains 24 individual synaptic connections
Network connection: ThirdToLower contains 24 individual synaptic connections

</meta:notes>

<meta:properties>
    <meta:property>
        <meta:tag>neuroConstruct_random_seed</meta:tag>
        <meta:value>-15289434</meta:value>
    </meta:property>
    <meta:property>
        <meta:tag>neuroConstruct_sim_config</meta:tag>
        <meta:value>Three Cell Groups</meta:value>
    </meta:property>
</meta:properties>

<populations>
    <population name="ThirdCellGroup" cell_type="SampleCell">
        <instances size="12">
            <instance id="0">
                <location x="72.76757" y="220.55316" z="60.717464"/>
            </instance>
            <instance id="1">
                <location x="144.8951" y="218.87236" z="91.31392"/>
            </instance>
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        </instances>
    </population>
    <population name="UpperCellGroup" cell_type="SampleCell">
        <instances size="12">
            <instance id="0">
                <location x="87.883224" y="113.40421" z="39.776455"/>
            </instance>
            <instance id="1">
                <location x="141.5979" y="112.46534" z="59.66761"/>
            </instance>
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        </instances>
    </population>
    <population name="LowerCellGroup" cell_type="SampleCell">
        <instances size="12">
            <instance id="0">
                <location x="161.07027" y="15.907837" z="145.4475"/>
            </instance>
            <instance id="1">
                <location x="121.63609" y="19.73039" z="96.20627"/>
            </instance>
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        </instances>
    </population>
</populations>

<projections units="Physiological Units">
    <projection name="UpperToThird" source="UpperCellGroup" target="ThirdCellGroup">
        <synapse_props synapse_type="DoubExpSyn" internal_delay="25.0" weight="0.55" threshold="-20.0">
        </synapse_props>
        <connections>
            <connection id="0" pre_cell_id="0" pre_segment_id="2" pre_fraction_along="0.45630693" post_cell_id="8" post_segment_id="1" post_fraction_along="1.0">
                <properties prop_delay="0.07161472" internal_delay="39.407684" weight="0.81270057"/>
            </connection>
            <connection id="1" pre_cell_id="0" pre_segment_id="2" pre_fraction_along="0.4600842" post_cell_id="3" post_segment_id="1" post_fraction_along="1.0">
                <properties prop_delay="0.08176951" internal_delay="12.592087" weight="0.8669447"/>
            </connection>
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        </connections>
    </projection>
    <projection name="Closest" source="LowerCellGroup" target="UpperCellGroup">
        <synapse_props synapse_type="DoubExpSyn" internal_delay="20.0" weight="1.0" threshold="-20.0">
        </synapse_props>
        <connections>
            <connection id="0" pre_cell_id="0" pre_segment_id="2" pre_fraction_along="0.802151" post_cell_id="11" post_segment_id="1" post_fraction_along="1.0">
                <properties prop_delay="0.060817283" internal_delay="25.313404" weight="1.0"/>
            </connection>
            <connection id="1" pre_cell_id="0" pre_segment_id="2" pre_fraction_along="0.8204533" post_cell_id="5" post_segment_id="1" post_fraction_along="1.0">
                <properties prop_delay="0.095205754" internal_delay="14.490614" weight="1.0"/>
            </connection>
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        </connections>
    </projection>
    <projection name="ThirdToLower" source="ThirdCellGroup" target="LowerCellGroup">
        <synapse_props synapse_type="DoubExpSyn" internal_delay="20.0" weight="0.55" threshold="-20.0">
        </synapse_props>
        <connections>
            <connection id="0" pre_cell_id="0" pre_segment_id="2" pre_fraction_along="0.14553767" post_cell_id="10" post_segment_id="1" post_fraction_along="0.15132803">
                <properties prop_delay="0.21744753" internal_delay="18.85657" weight="0.8262088"/>
            </connection>
            <connection id="1" pre_cell_id="0" pre_segment_id="2" pre_fraction_along="0.031424046" post_cell_id="3" post_segment_id="1" post_fraction_along="0.44448987">
                <properties prop_delay="0.21611597" internal_delay="13.192381" weight="0.535573"/>
            </connection>
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        </connections>
    </projection>
</projections>

<inputs units="Physiological Units">
    <input name="Input_1">
        <pulse_input delay="20.0" duration="10.0" amplitude="2.0E-4"/>
        <target population="LowerCellGroup">
            <sites size="4">
                <site cell_id="1" segment_id="0" fraction_along="0.5"/>
                <site cell_id="3" segment_id="0" fraction_along="0.5"/>
                <site cell_id="10" segment_id="0" fraction_along="0.5"/>
                <site cell_id="11" segment_id="0" fraction_along="0.5"/>
            </sites>
        </target>
    </input>
</inputs>

</networkml>
